#Initialize--
#general settings
units           metal
dimension       3
box tilt        large
atom_style      atomic

# structure
boundary        p p p
read_data       /home/mshinjan/Phonons/MoirePhonons/Force_Constant_Generation/Examples/tbmos2_38.2/lammps.dat

# potentials
pair_style hybrid/overlay sw/mod maxdelcs 0.25 0.35 sw/mod maxdelcs 0.25 0.35 kolmogorov/crespi/z 14.0 kolmogorov/crespi/z 14.0 kolmogorov/crespi/z 14.0 kolmogorov/crespi/z 14.0 lj/cut 10.0

# Intralayer Interaction
pair_coeff * * sw/mod 1 /home/mshinjan/Phonons/MoirePhonons/Force_Constant_Generation/Examples/tbmos2_38.2/tmd.sw Mo S S NULL NULL NULL
pair_coeff * * sw/mod 2 /home/mshinjan/Phonons/MoirePhonons/Force_Constant_Generation/Examples/tbmos2_38.2/tmd.sw NULL NULL NULL Mo S S

# Interlayer Interaction
pair_coeff 1 5 kolmogorov/crespi/z 1 /home/mshinjan/Phonons/MoirePhonons/Force_Constant_Generation/Examples/tbmos2_38.2/MoS.KC Mo NULL NULL  NULL S NULL
pair_coeff 3 4 kolmogorov/crespi/z 2 /home/mshinjan/Phonons/MoirePhonons/Force_Constant_Generation/Examples/tbmos2_38.2/MoS.KC NULL NULL S  Mo NULL NULL
pair_coeff 3 5 kolmogorov/crespi/z 3 /home/mshinjan/Phonons/MoirePhonons/Force_Constant_Generation/Examples/tbmos2_38.2/MoS.KC NULL NULL S  NULL S NULL
pair_coeff 1 4 kolmogorov/crespi/z 4 /home/mshinjan/Phonons/MoirePhonons/Force_Constant_Generation/Examples/tbmos2_38.2/MoS.KC Mo NULL NULL  Mo NULL NULL
pair_coeff * * lj/cut 0.0 3.0
neighbor        2.0 bin
neigh_modify every 1 delay 0 check yes
